New Load.LD1 bus1=b1 phases=3 kV=13.8 kW=1195.115 kvar=0.0 model=5 vminpu=0.7 vmaxpu=1.3
New Load.LD4 bus1=b4 phases=3 kV=13.8 kW=1195.115 kvar=0.0 model=5 vminpu=0.7 vmaxpu=1.3
New Load.LD5 bus1=b5 phases=3 kV=13.8 kW=1195.115 kvar=0.0 model=5 vminpu=0.7 vmaxpu=1.3
New Load.LD6 bus1=b6 phases=3 kV=13.8 kW=1195.115 kvar=0.0 model=5 vminpu=0.7 vmaxpu=1.3
New Load.LD8 bus1=b8 phases=3 kV=13.8 kW=1195.115 kvar=0.0 model=5 vminpu=0.7 vmaxpu=1.3
New Load.LD9 bus1=b9 phases=3 kV=13.8 kW=1195.115 kvar=0.0 model=5 vminpu=0.7 vmaxpu=1.3
New Load.LD11 bus1=b11 phases=3 kV=13.8 kW=1195.115 kvar=0.0 model=5 vminpu=0.7 vmaxpu=1.3
New Load.LD12 bus1=b12 phases=3 kV=13.8 kW=1195.115 kvar=0.0 model=5 vminpu=0.7 vmaxpu=1.3
New Load.LD13 bus1=b13 phases=3 kV=13.8 kW=1195.115 kvar=0.0 model=5 vminpu=0.7 vmaxpu=1.3
New Load.LD16 bus1=b16 phases=3 kV=13.8 kW=1195.115 kvar=0.0 model=5 vminpu=0.7 vmaxpu=1.3
