New Line.L2 bus1=b2 bus2=b3 linecode=C1 length=1.0 units=km  ! existente
New Line.L3 bus1=b3 bus2=b4 linecode=C1 length=1.0 units=km  ! existente
New Line.L4 bus1=b1 bus2=b5 linecode=C3 length=1.0 units=km  ! recondutorada
New Line.L5 bus1=b5 bus2=b6 linecode=C1 length=1.0 units=km  ! existente
New Line.L6 bus1=b17 bus2=b5 linecode=C1 length=1.0 units=km  ! existente
New Line.L8 bus1=b18 bus2=b12 linecode=C1 length=1.0 units=km  ! existente
New Line.L9 bus1=b4 bus2=b8 linecode=C2 length=1.0 units=km  ! nueva
New Line.L12 bus1=b7 bus2=b8 linecode=C3 length=1.0 units=km  ! nueva
New Line.L14 bus1=b8 bus2=b12 linecode=C1 length=1.0 units=km  ! nueva
New Line.L15 bus1=b9 bus2=b10 linecode=C1 length=1.0 units=km  ! nueva
New Line.L18 bus1=b10 bus2=b11 linecode=C1 length=1.0 units=km  ! nueva
New Line.L20 bus1=b18 bus2=b11 linecode=C2 length=1.0 units=km  ! nueva
New Line.L21 bus1=b13 bus2=b14 linecode=C3 length=1.0 units=km  ! nueva
New Line.L22 bus1=b17 bus2=b13 linecode=C3 length=1.0 units=km  ! nueva
New Line.L23 bus1=b14 bus2=b15 linecode=C1 length=1.0 units=km  ! nueva
New Line.L24 bus1=b15 bus2=b16 linecode=C1 length=1.0 units=km  ! nueva
