! Conductores de red23 (data/red23/conductors.csv)
New Linecode.C1 nphases=3 units=km r1=0.6045 x1=0.429 r0=0.6045 x0=0.429 c1=0 c0=0 normamps=230.0 emergamps=230.0
New Linecode.C4 nphases=3 units=km r1=0.3017 x1=0.402 r0=0.3017 x0=0.402 c1=0 c0=0 normamps=340.0 emergamps=340.0
