New Line.L1 bus1=b1 bus2=b10 linecode=C1 length=0.20209 units=km  ! nueva
New Line.L4 bus1=b3 bus2=b9 linecode=C1 length=1.8202 units=km  ! nueva
New Line.L6 bus1=b4 bus2=b5 linecode=C1 length=0.9402 units=km  ! nueva
New Line.L11 bus1=b5 bus2=b23 linecode=C1 length=0.64091 units=km  ! nueva
New Line.L12 bus1=b6 bus2=b7 linecode=C1 length=0.81807 units=km  ! nueva
New Line.L13 bus1=b6 bus2=b14 linecode=C1 length=0.81772 units=km  ! nueva
New Line.L15 bus1=b7 bus2=b8 linecode=C1 length=0.68661 units=km  ! nueva
New Line.L16 bus1=b8 bus2=b9 linecode=C1 length=2.0567 units=km  ! nueva
New Line.L17 bus1=b10 bus2=b14 linecode=C1 length=0.42971 units=km  ! nueva
New Line.L18 bus1=b10 bus2=b19 linecode=C1 length=0.59489 units=km  ! nueva
New Line.L19 bus1=b10 bus2=b20 linecode=C1 length=0.69728 units=km  ! nueva
New Line.L20 bus1=b11 bus2=b13 linecode=C1 length=0.50527 units=km  ! nueva
New Line.L21 bus1=b11 bus2=b21 linecode=C1 length=0.63941 units=km  ! nueva
New Line.L24 bus1=b12 bus2=b23 linecode=C1 length=0.67855 units=km  ! nueva
New Line.L26 bus1=b14 bus2=b17 linecode=C1 length=0.44821 units=km  ! nueva
New Line.L27 bus1=b14 bus2=b23 linecode=C1 length=0.48604 units=km  ! nueva
New Line.L28 bus1=b15 bus2=b18 linecode=C1 length=0.57114 units=km  ! nueva
New Line.L30 bus1=b16 bus2=b20 linecode=C1 length=0.50185 units=km  ! nueva
New Line.L32 bus1=b17 bus2=b18 linecode=C1 length=0.44113 units=km  ! nueva
New Line.L34 bus1=b19 bus2=b21 linecode=C1 length=0.555 units=km  ! nueva
New Line.L35 bus1=b19 bus2=b22 linecode=C1 length=0.58266 units=km  ! nueva
