New Load.LD1 bus1=b1 phases=3 kV=13.8 kW=1080.0 kvar=523.068 model=1 vminpu=0.7 vmaxpu=1.3
New Load.LD2 bus1=b2 phases=3 kV=13.8 kW=1080.0 kvar=523.068 model=1 vminpu=0.7 vmaxpu=1.3
New Load.LD3 bus1=b3 phases=3 kV=13.8 kW=1080.0 kvar=523.068 model=1 vminpu=0.7 vmaxpu=1.3
New Load.LD4 bus1=b4 phases=3 kV=13.8 kW=1080.0 kvar=523.068 model=1 vminpu=0.7 vmaxpu=1.3
New Load.LD5 bus1=b5 phases=3 kV=13.8 kW=1080.0 kvar=523.068 model=1 vminpu=0.7 vmaxpu=1.3
New Load.LD6 bus1=b6 phases=3 kV=13.8 kW=1080.0 kvar=523.068 model=1 vminpu=0.7 vmaxpu=1.3
New Load.LD12 bus1=b12 phases=3 kV=13.8 kW=1080.0 kvar=523.068 model=1 vminpu=0.7 vmaxpu=1.3
New Load.LD16 bus1=b16 phases=3 kV=13.8 kW=1080.0 kvar=523.068 model=1 vminpu=0.7 vmaxpu=1.3
