New Line.L1 bus1=b1 bus2=b2 linecode=C1 length=1.0 units=km  ! existente
New Line.L2 bus1=b2 bus2=b3 linecode=C1 length=1.0 units=km  ! existente
New Line.L3 bus1=b3 bus2=b4 linecode=C1 length=1.0 units=km  ! existente
New Line.L4 bus1=b5 bus2=b1 linecode=C1 length=1.0 units=km  ! existente
New Line.L5 bus1=b5 bus2=b6 linecode=C1 length=1.0 units=km  ! existente
New Line.L6 bus1=b25 bus2=b5 linecode=C1 length=1.0 units=km  ! existente
New Line.L7 bus1=b12 bus2=b16 linecode=C1 length=1.0 units=km  ! existente
New Line.L8 bus1=b26 bus2=b12 linecode=C1 length=1.0 units=km  ! existente
