New Load.LD1 bus1=b1 phases=3 kV=13.8 kW=1080.0 kvar=523.068 model=1 vminpu=0.7 vmaxpu=1.3
New Load.LD4 bus1=b4 phases=3 kV=13.8 kW=1080.0 kvar=523.068 model=1 vminpu=0.7 vmaxpu=1.3
New Load.LD5 bus1=b5 phases=3 kV=13.8 kW=1080.0 kvar=523.068 model=1 vminpu=0.7 vmaxpu=1.3
New Load.LD6 bus1=b6 phases=3 kV=13.8 kW=1080.0 kvar=523.068 model=1 vminpu=0.7 vmaxpu=1.3
New Load.LD8 bus1=b8 phases=3 kV=13.8 kW=1080.0 kvar=523.068 model=1 vminpu=0.7 vmaxpu=1.3
New Load.LD11 bus1=b11 phases=3 kV=13.8 kW=1080.0 kvar=523.068 model=1 vminpu=0.7 vmaxpu=1.3
New Load.LD13 bus1=b13 phases=3 kV=13.8 kW=1080.0 kvar=523.068 model=1 vminpu=0.7 vmaxpu=1.3
New Load.LD16 bus1=b16 phases=3 kV=13.8 kW=1080.0 kvar=523.068 model=1 vminpu=0.7 vmaxpu=1.3
New Load.LD19 bus1=b19 phases=3 kV=13.8 kW=1080.0 kvar=523.068 model=1 vminpu=0.7 vmaxpu=1.3
New Load.LD21 bus1=b21 phases=3 kV=13.8 kW=1080.0 kvar=523.068 model=1 vminpu=0.7 vmaxpu=1.3
New Load.LD24 bus1=b24 phases=3 kV=13.8 kW=1080.0 kvar=523.068 model=1 vminpu=0.7 vmaxpu=1.3
