New Line.L1 bus1=b1 bus2=b2 linecode=C1 length=1.0 units=km  ! existente
New Line.L2 bus1=b2 bus2=b3 linecode=C1 length=1.0 units=km  ! existente
New Line.L3 bus1=b3 bus2=b4 linecode=C1 length=1.0 units=km  ! existente
New Line.L4 bus1=b5 bus2=b1 linecode=C1 length=1.0 units=km  ! existente
New Line.L5 bus1=b5 bus2=b6 linecode=C1 length=1.0 units=km  ! existente
New Line.L6 bus1=b25 bus2=b5 linecode=C3 length=1.0 units=km  ! recondutorada
New Line.L7 bus1=b12 bus2=b16 linecode=C1 length=1.0 units=km  ! existente
New Line.L8 bus1=b26 bus2=b12 linecode=C3 length=1.0 units=km  ! recondutorada
New Line.L10 bus1=b5 bus2=b10 linecode=C1 length=1.0 units=km  ! nueva
New Line.L12 bus1=b7 bus2=b8 linecode=C1 length=1.0 units=km  ! nueva
New Line.L14 bus1=b8 bus2=b12 linecode=C1 length=1.0 units=km  ! nueva
New Line.L16 bus1=b9 bus2=b13 linecode=C2 length=1.0 units=km  ! nueva
New Line.L17 bus1=b9 bus2=b25 linecode=C2 length=1.0 units=km  ! nueva
New Line.L19 bus1=b11 bus2=b22 linecode=C1 length=1.0 units=km  ! nueva
New Line.L20 bus1=b11 bus2=b26 linecode=C1 length=1.0 units=km  ! nueva
New Line.L21 bus1=b13 bus2=b14 linecode=C1 length=1.0 units=km  ! nueva
New Line.L24 bus1=b15 bus2=b16 linecode=C1 length=1.0 units=km  ! nueva
New Line.L27 bus1=b7 bus2=b19 linecode=C1 length=1.0 units=km  ! nueva
New Line.L28 bus1=b17 bus2=b18 linecode=C1 length=1.0 units=km  ! nueva
New Line.L29 bus1=b25 bus2=b18 linecode=C1 length=1.0 units=km  ! nueva
New Line.L30 bus1=b13 bus2=b20 linecode=C1 length=1.0 units=km  ! nueva
New Line.L31 bus1=b10 bus2=b21 linecode=C1 length=1.0 units=km  ! nueva
New Line.L38 bus1=b23 bus2=b24 linecode=C1 length=1.0 units=km  ! nueva
New Line.L39 bus1=b12 bus2=b24 linecode=C1 length=1.0 units=km  ! nueva
