New Line.L1 bus1=b51 bus2=b1 linecode=C2 length=1.405 units=km  ! existente
New Line.L2 bus1=b51 bus2=b3 linecode=C2 length=1.09 units=km  ! existente
New Line.L3 bus1=b3 bus2=b4 linecode=C1 length=1.56 units=km  ! existente
New Line.L4 bus1=b4 bus2=b7 linecode=C1 length=1.25 units=km  ! existente
New Line.L5 bus1=b4 bus2=b5 linecode=C1 length=1.56 units=km  ! existente
New Line.L6 bus1=b7 bus2=b8 linecode=C1 length=1.56 units=km  ! existente
New Line.L7 bus1=b5 bus2=b6 linecode=C1 length=1.25 units=km  ! existente
New Line.L8 bus1=b1 bus2=b9 linecode=C1 length=1.715 units=km  ! existente
New Line.L9 bus1=b1 bus2=b2 linecode=C1 length=1.56 units=km  ! existente
New Line.L10 bus1=b9 bus2=b10 linecode=C1 length=3.59 units=km  ! existente
New Line.L11 bus1=b52 bus2=b14 linecode=C1 length=1.875 units=km  ! existente
New Line.L12 bus1=b14 bus2=b15 linecode=C1 length=1.875 units=km  ! existente
New Line.L13 bus1=b15 bus2=b16 linecode=C1 length=1.405 units=km  ! existente
New Line.L14 bus1=b52 bus2=b11 linecode=C1 length=1.405 units=km  ! existente
New Line.L15 bus1=b11 bus2=b12 linecode=C1 length=1.56 units=km  ! existente
New Line.L16 bus1=b12 bus2=b13 linecode=C1 length=2.185 units=km  ! existente
