New Line.L1 bus1=b51 bus2=b1 linecode=C7 length=1.405 units=km  ! recondutorada
New Line.L2 bus1=b51 bus2=b3 linecode=C4 length=1.09 units=km  ! recondutorada
New Line.L3 bus1=b3 bus2=b4 linecode=C3 length=1.56 units=km  ! recondutorada
New Line.L4 bus1=b4 bus2=b7 linecode=C1 length=1.25 units=km  ! existente
New Line.L6 bus1=b7 bus2=b8 linecode=C1 length=1.56 units=km  ! existente
New Line.L7 bus1=b5 bus2=b6 linecode=C1 length=1.25 units=km  ! existente
New Line.L8 bus1=b1 bus2=b9 linecode=C2 length=1.715 units=km  ! recondutorada
New Line.L9 bus1=b1 bus2=b2 linecode=C1 length=1.56 units=km  ! existente
New Line.L10 bus1=b9 bus2=b10 linecode=C1 length=3.59 units=km  ! existente
New Line.L11 bus1=b52 bus2=b14 linecode=C3 length=1.875 units=km  ! recondutorada
New Line.L12 bus1=b14 bus2=b15 linecode=C1 length=1.875 units=km  ! existente
New Line.L14 bus1=b52 bus2=b11 linecode=C8 length=1.405 units=km  ! recondutorada
New Line.L15 bus1=b11 bus2=b12 linecode=C8 length=1.56 units=km  ! recondutorada
New Line.L16 bus1=b12 bus2=b13 linecode=C1 length=2.185 units=km  ! existente
New Line.L17 bus1=b19 bus2=b20 linecode=C1 length=1.56 units=km  ! nueva
New Line.L18 bus1=b18 bus2=b19 linecode=C1 length=1.25 units=km  ! nueva
New Line.L19 bus1=b17 bus2=b18 linecode=C1 length=2.03 units=km  ! nueva
New Line.L21 bus1=b18 bus2=b21 linecode=C2 length=1.56 units=km  ! nueva
New Line.L22 bus1=b54 bus2=b21 linecode=C3 length=1.25 units=km  ! nueva
New Line.L23 bus1=b54 bus2=b22 linecode=C1 length=1.875 units=km  ! nueva
New Line.L25 bus1=b22 bus2=b23 linecode=C1 length=1.715 units=km  ! nueva
New Line.L26 bus1=b23 bus2=b24 linecode=C1 length=1.405 units=km  ! nueva
New Line.L27 bus1=b24 bus2=b25 linecode=C1 length=1.09 units=km  ! nueva
New Line.L30 bus1=b27 bus2=b26 linecode=C1 length=1.715 units=km  ! nueva
New Line.L31 bus1=b27 bus2=b28 linecode=C1 length=1.56 units=km  ! nueva
New Line.L32 bus1=b6 bus2=b28 linecode=C1 length=2.5 units=km  ! nueva
New Line.L33 bus1=b54 bus2=b30 linecode=C5 length=1.405 units=km  ! nueva
New Line.L34 bus1=b30 bus2=b29 linecode=C1 length=1.56 units=km  ! nueva
New Line.L35 bus1=b30 bus2=b43 linecode=C2 length=2.03 units=km  ! nueva
New Line.L36 bus1=b43 bus2=b37 linecode=C1 length=1.25 units=km  ! nueva
New Line.L37 bus1=b37 bus2=b31 linecode=C1 length=0.935 units=km  ! nueva
New Line.L40 bus1=b12 bus2=b45 linecode=C7 length=1.25 units=km  ! nueva
New Line.L41 bus1=b45 bus2=b44 linecode=C7 length=1.09 units=km  ! nueva
New Line.L42 bus1=b44 bus2=b38 linecode=C5 length=1.56 units=km  ! nueva
New Line.L43 bus1=b38 bus2=b39 linecode=C3 length=1.715 units=km  ! nueva
New Line.L44 bus1=b39 bus2=b32 linecode=C1 length=2.03 units=km  ! nueva
New Line.L47 bus1=b33 bus2=b34 linecode=C1 length=0.935 units=km  ! nueva
New Line.L48 bus1=b34 bus2=b35 linecode=C2 length=1.09 units=km  ! nueva
New Line.L49 bus1=b35 bus2=b36 linecode=C3 length=1.09 units=km  ! nueva
New Line.L50 bus1=b53 bus2=b36 linecode=C3 length=1.25 units=km  ! nueva
New Line.L51 bus1=b53 bus2=b28 linecode=C4 length=1.56 units=km  ! nueva
New Line.L52 bus1=b53 bus2=b41 linecode=C5 length=1.56 units=km  ! nueva
New Line.L53 bus1=b41 bus2=b40 linecode=C1 length=1.25 units=km  ! nueva
New Line.L54 bus1=b40 bus2=b16 linecode=C1 length=1.25 units=km  ! nueva
New Line.L55 bus1=b41 bus2=b42 linecode=C1 length=1.875 units=km  ! nueva
New Line.L56 bus1=b42 bus2=b48 linecode=C1 length=1.25 units=km  ! nueva
New Line.L57 bus1=b48 bus2=b49 linecode=C1 length=1.875 units=km  ! nueva
New Line.L58 bus1=b49 bus2=b50 linecode=C1 length=1.09 units=km  ! nueva
New Line.L60 bus1=b47 bus2=b46 linecode=C1 length=1.56 units=km  ! nueva
New Line.L61 bus1=b46 bus2=b14 linecode=C1 length=1.715 units=km  ! nueva
