! Conductores de red54 (data/red54/conductors.csv)
New Linecode.C1 nphases=3 units=km r1=0.3655 x1=0.252 r0=0.3655 x0=0.252 c1=0 c0=0 normamps=150.0 emergamps=150.0
New Linecode.C2 nphases=3 units=km r1=0.2921 x1=0.2466 r0=0.2921 x0=0.2466 c1=0 c0=0 normamps=200.0 emergamps=200.0
New Linecode.C3 nphases=3 units=km r1=0.2359 x1=0.2402 r0=0.2359 x0=0.2402 c1=0 c0=0 normamps=250.0 emergamps=250.0
New Linecode.C4 nphases=3 units=km r1=0.1932 x1=0.2279 r0=0.1932 x0=0.2279 c1=0 c0=0 normamps=300.0 emergamps=300.0
New Linecode.C5 nphases=3 units=km r1=0.1827 x1=0.126 r0=0.1827 x0=0.126 c1=0 c0=0 normamps=350.0 emergamps=350.0
New Linecode.C6 nphases=3 units=km r1=0.146 x1=0.1233 r0=0.146 x0=0.1233 c1=0 c0=0 normamps=400.0 emergamps=400.0
New Linecode.C7 nphases=3 units=km r1=0.118 x1=0.1201 r0=0.118 x0=0.1201 c1=0 c0=0 normamps=500.0 emergamps=500.0
New Linecode.C8 nphases=3 units=km r1=0.0966 x1=0.114 r0=0.0966 x0=0.114 c1=0 c0=0 normamps=600.0 emergamps=600.0
